M := [2.2, 1, 0.5, 2; 1, 1.3, 2, 1; 0.5, 2, 0.5, 1.6; 2, 1, 1.6, 2]
u := [559.89; -521.153; 167.119; -21.96; 1]
t := 8
k := 3*(1 - 4) + 8 = -1
a := 0.11*t = 0.88
eigenvals(M) = [5.65203; 1.54542; 0.222636; -1.42009]
b := 0.02*k = -0.02
g := 0.02*k = -0.02
polyroots(u) = [2.43185; 4.01457; 6.0779; 9.43568]
d := 0.015*t = 0.12
eigenvecs(M) = [
    0.531736, 0.62893, 0.521921, 0.222043;
    0.446194, -0.572574, 0.454869, -0.51591;
    0.408816, -0.485654, -0.153447, 0.757274;
    0.592484, 0.201858, -0.705086, -0.333271
]
v := [-2.762; 12.735; -0.2; -6; 1]
A := [
    6.26 + a, 1.1 - b, 0.97 + g, 1.24 - d;
    1.1 - b, 4.16 - a, 1.3, 0.16;
    0.97 + g, 1.3, 5.44 + a, 2.1;
    1.24 - d, 0.16, 2.1, 6.1 - a
] = [7.14, 1.12, 0.95, 1.12; 1.12, 3.28, 1.3, 0.16; 0.95, 1.3, 6.32, 2.1; 1.12, 0.16, 2.1, 5.22]
polyroots(v) = [-1.4201; 0.22267; 1.54539; 5.65203]
eigenvals(A) = [9.43536; 6.07854; 2.4319; 4.0142]
eigenvecs(A) = [
    0.598237, 0.776591, -0.193676, 0.0388432;
    0.248021, 0.0396218, 0.822686, -0.510004;
    0.601354, -0.545227, -0.411787, -0.414165;
    0.467944, -0.313152, 0.340748, 0.752897
]
