a := 0.5
b := 1.4
f(x) := (x + 1)*sin(x)
integral(f(x), x = a .. b) = 1.41448
# Method of trapezii | Method of Gauss
x := 1
a ≤ x ≤ b
# Друга похідна | Десята похідна
g(x) := 2*cos(x) - (x + 1)*sin(x)
h(x) := 10*cos(x) - (x + 1)*sin(x)
m := Maximize(g, x)
# Максимум похідної на відрізку
k := Maximize(h, x)
m = -0.246178
k = -0.0831571
# Кількість відрізків
n2 := 5
n1 := 1000
# Аналітична похибка
AnalyticError2 := |k*(n2!)^4*(b - a)^(n2 - 1)/((2*n2 + 1)*((2*n2)!)^3)| = 2.15235e-14
AnalyticError1 := |m*(b - a)^3/(12*n1^2)| = 1.49553e-8
# Реальна похибка
RealError1 := |1.41235 - 1.414| = 0.00165
RealError2 := |1.41408 - 1.414| = 8e-5
