y[0] := 0
D(x, y) := 1 - sin(1.4*x + y) + 1.8*y/(2 + x)
f(x, y) := 1 - sin(1.4*x + y) + 1.8*y/(2 + x)
z := rkfixed(y, 0, 5, 50, D)
0 ≤ x ≤ 5
y0 := 0
z = [
    0, 0;
    0.1, 0.0924419;
    0.2, 0.169994;
    0.3, 0.233784;
    0.4, 0.285631;
    0.5, 0.327717;
    0.6, 0.362403;
    0.7, 0.392146;
    0.8, 0.419487;
    0.9, 0.447095
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]
